// COMSOL Multiphysics 5.6.0.401 model "iss_2Daxisym_TDSphysics_model.mph"
// Outline of the model tree

Parameters
  n = 1  // number of electrons
  FAR = 96485[C/mol]  // Faraday's constant
  el_rad = 5[um]  // electrode radius
  Tb = 293.15[K]  // temperature
  D = 1e-5[cm^2/s]  // diffusion coefficient
  Cb = 5[mM]  // bulk concentration
  RG = 50  // ratio between the radius of glass and electrode
  Iss = 4*n*FAR*D*Cb*el_rad  // limiting current equation

Geometry
  geom1 "Geometry 1" (2D axisymmetric, length unit m)
    r1: Rectangle "electrode" | size = {el_rad, 100*el_rad}
    r2: Rectangle "glass" | size = {RG*el_rad, 100*el_rad}
    r3: Rectangle "solution" | pos = {0, -100*el_rad}; size = {100*el_rad, 200*el_rad}
    fin: Finalize "Form Union"

Physics
  tds: DilutedSpecies "Transport of Diluted Species" on domains 1
    dependent variable Cox = {Cox, Cred}
    TransportMechanism.Convection = 0
    cdm1: ConvectionDiffusionMigration "Transport Properties 1" (default) | D_Cox = D; D_Cred = D
    axi1: AxialSymmetry (default)
    nflx1: NoFlux (default)
    init1: init "Initial Values 1" (default) | initc = {Cb, 0}
    conc1: Concentration on boundaries 2, 10, 11 | species = {1, 1}; c0 = {Cb, 0}
    conc2: Concentration on boundaries 4 | species = {1, 1}; c0 = {0, Cb}

Mesh
  mesh1 "Mesh 1"
    size: MeshSizeDefault | hauto = 6
    edg1: Edge on boundaries 4
      size1: Size on entire geometry | hmax = el_rad/100; custom = on
    ftri1: FreeTri "Free Triangular 1" on domains 1 | smoothmaxiter = 4; smoothmaxdepth = 4
    ref1: Refine on entire geometry | numrefine = 3

Studies
  std1 "Study 1"
    stat: Stationary