// COMSOL Multiphysics 5.6.0.401 model "CV_2Daxisym_TDSphysics_model.mph"
// Outline of the model tree

Parameters
  n = 1  // Number of electron transfer
  FAR = 96485[C/mol]  // Faraday constant
  Rc = 8.314[J/mol/K]  // Gas constant
  Tb = 293.15[K]  // Temperature
  fc = n*FAR/Rc/Tb  // constant
  E0 = 0.25[V]  // Standard potential
  Ein = 0[V]  // Start potential for CV
  Ev = 0.5[V]  // Vertex potential for CV
  Ef = 0[V]  // Final potential for CV
  k0 = 1[cm/s]  // Standard rate constant
  a = 0.5  // Transfer coefficient
  Cb = 5[mM]  // Bulk concentration
  D = 1e-5[cm^2/s]  // Diffusion coefficient
  sr = 10[mV/s]  // Scan rate
  el_rad = 5[um]  // Electrode radius
  RG = 50  // Ratio between the radius of glass and electrode
  t_exp1 = abs(Ein-Ev)/sr  // Forward scanning time
  t_exp2 = abs(Ev-Ef)/sr  // Backward scanning time
  t_exp = t_exp1+t_exp2  // Total scanning time
  Ilim = 4*n*FAR*D*Cb*el_rad  // Limiting current

Functions
  pw1: Piecewise | funcname = E; arg = t; pieces = {{0, t_exp1, Ein-sr*t}, {t_exp1, t_exp, Ev+sr*(t-t_exp1)}}; argunit = s; fununit = V

Variables
  var1 "Variables 1"
    kf = k0*exp((-a)*n*fc*(E(t)-E0))  // Forward rate constant
    kb = k0*exp((1-a)*n*fc*(E(t)-E0))  // Backward rate costant

Geometry
  geom1 "Geometry 1" (2D axisymmetric, length unit m)
    r1: Rectangle "electrode" | size = {el_rad, 100*el_rad}
    r2: Rectangle "glass" | size = {RG*el_rad, 100*el_rad}
    r3: Rectangle "solution" | pos = {0, -100*el_rad}; size = {100*el_rad, 200*el_rad}
    fin: Finalize "Form Union"

Physics
  tds: DilutedSpecies "Transport of Diluted Species" on domains 1
    dependent variable Cox = {Cox, Cred}
    TransportMechanism.Convection = 0
    cdm1: ConvectionDiffusionMigration "Transport Properties 1" (default) | D_Cox = D; D_Cred = D
    axi1: AxialSymmetry (default)
    nflx1: NoFlux (default)
    init1: init "Initial Values 1" (default) | initc = {Cb, 0}
    conc1: Concentration on boundaries 2, 10, 11 | species = {1, 1}; c0 = {Cb, 0}
    fl1: FluxBoundary "Flux 1" on boundaries 4
      FluxType = GeneralInwardFlux
      species = {1, 1}
      J0 = {-(kf*Cox-kb*Cred), kf*Cox-kb*Cred}
    srf1: SurfaceReactionsFlux "Surface Reactions 1" (disabled) on boundaries 4 | J0_Cox = -kf*Cox; J0_Cred = kb*Cred

Mesh
  mesh1 "Mesh 1"
    size: MeshSizeDefault | hauto = 6
    edg1: Edge on boundaries 4
      size1: Size on entire geometry | hmax = el_rad/100; custom = on
    ftri1: FreeTri "Free Triangular 1" on domains 1 | smoothmaxiter = 4; smoothmaxdepth = 4

Studies
  std1 "Study 1"
    time: Transient "Time Dependent" | tlist = range(0,0.1,t_exp)

Plots
  pg5: PlotGroup1D "1D Plot Group 5"