// COMSOL Multiphysics 5.6.0.401 model "DPV_2Daxisym_TDSphysics_model.mph"
// Outline of the model tree

Parameters
  n = 1  // Number of electron transfer
  FAR = 96485[C/mol]  // Faraday constant
  Rc = 8.314[J/mol/K]  // Gas constant
  Tb = 293.15[K]  // Temperature
  fc = FAR/Rc/Tb  // f constant
  E0 = 0.25[V]  // Standard potential
  Ein = 0.5[V]  // Start potential for CV
  Ev = 0[V]  // Vertex potential for CV
  Ef = 0.5[V]  // Final potential for CV
  k0 = 1[cm/s]  // Standard rate constant
  a = 0.5  // Transfer coefficient
  Cb = 5[mM]  // Bulk concentration
  D = 1e-5[cm^2/s]  // Diffusion coefficient
  el_rad = 5[um]  // Electrode radius
  RG = 50  // Ratio between the radius of glass and electrode
  Es = -0.01[V]  // increment base potential of each step
  Ep = -0.1[V]  // pulse height
  tp = 0.05[s]  // pulse time
  tw = 0.45[s]  // waiting time before pulse
  ts = tw+tp  // total time of each step
  t_tot = (Ev-Ein)*(tp+tw)/Es  // total experiment time
  sr = Es/ts  // Scan rate
  Ilim = 4*n*FAR*D*Cb*el_rad  // Limiting current

Functions
  an3: Analytic "Scale time function" | funcname = x; expr = t/(tp+tw); args = t; argunit = s
  an1: Analytic "Pulse function" | funcname = p; expr = floor(x(t)*((tw+tp)/tw)); args = t; periodic = on; periodicupper = tp+tw; argunit = s
  an2: Analytic "Step num function" | funcname = s; expr = ceil(x(t))-1; args = t; argunit = s
  an4: Analytic "Pot time function" | funcname = E; expr = Ein+p(t)*Ep+s(t)*Es; args = t; argunit = s; fununit = V

Variables
  var1 "Variables 1"
    kf = k0*exp((-a)*n*fc*(E(t)-E0))  // Forward rate constant
    kb = k0*exp((1-a)*n*fc*(E(t)-E0))  // Backward rate costant

Geometry
  geom1 "Geometry 1" (2D axisymmetric, length unit m)
    r1: Rectangle "electrode" | size = {el_rad, 100*el_rad}
    r2: Rectangle "glass" | size = {RG*el_rad, 100*el_rad}
    r3: Rectangle "solution" | pos = {0, -100*el_rad}; size = {100*el_rad, 200*el_rad}
    fin: Finalize "Form Union"

Physics
  tds: DilutedSpecies "Transport of Diluted Species" on domains 1
    dependent variable Cox = {Cox, Cred}
    TransportMechanism.Convection = 0
    cdm1: ConvectionDiffusionMigration "Transport Properties 1" (default) | D_Cox = D; D_Cred = D; minput_temperature = Tb
    axi1: AxialSymmetry (default)
    nflx1: NoFlux (default)
    init1: init "Initial Values 1" (default) | initc = {Cb, 0}
    conc1: Concentration on boundaries 2, 10, 11 | species = {1, 1}; c0 = {Cb, 0}
    fl1: FluxBoundary "Flux 1" on boundaries 4 | species = {1, 1}; J0 = {-(kf*Cox-kb*Cred), kf*Cox-kb*Cred}

Mesh
  mesh1 "Mesh 1"
    edg1: Edge on boundaries 4
      size1: Size on entire geometry | hmax = el_rad/100; custom = on
    ftri1: FreeTri "Free Triangular 1" on domains 1 | smoothmaxiter = 4; smoothmaxdepth = 4

Studies
  std1 "Study 1"
    time: Transient "Time Dependent-forward sample" | tlist = range(ts-0.001,ts,t_tot)
  std2 "Study 2"
    time: Transient "Time Dependent" | tlist = range(tw-0.001,ts,t_tot)