// COMSOL Multiphysics 5.6.0.401 model "DPV_2Daxisym_TDSphysics_results4_refine_continue.mph"
// Outline of the model tree

Parameters
  n = 1  // Number of electron transfer
  FAR = 96485[C/mol]  // Faraday constant
  Rc = 8.314[J/mol/K]  // Gas constant
  Tb = 293.15[K]  // Temperature
  fc = FAR/Rc/Tb  // f constant
  E0 = 0.25[V]  // Standard potential
  Ein = 0.5[V]  // Start potential for CV
  Ev = 0[V]  // Vertex potential for CV
  Ef = 0.5[V]  // Final potential for CV
  k0 = 1[cm/s]  // Standard rate constant
  a = 0.5  // Transfer coefficient
  Cb = 5[mM]  // Bulk concentration
  D = 1e-5[cm^2/s]  // Diffusion coefficient
  el_rad = 5[um]  // Electrode radius
  RG = 50  // Ratio between the radius of glass and electrode
  Es = -0.01[V]  // increment base potential of each step
  Ep = -0.1[V]  // pulse height
  tp = 0.05[s]  // pulse time
  tw = 0.45[s]  // waiting time before pulse
  ts = tw+tp  // total time of each step
  t_tot = (Ev-Ein)*(tp+tw)/Es  // total experiment time
  sr = Es/ts  // Scan rate
  Ilim = 4*n*FAR*D*Cb*el_rad  // Limiting current

Functions
  an6: Analytic "staircase" | funcname = s; expr = (sr/Es)*(t-mod(t,ts)); args = t; periodicupper = tp+tw
  an7: Analytic "pulse" | funcname = p; expr = flc1hs(t-tw,0.5*0.00001)-flc1hs(t-ts,0.5*0.00001); args = t; periodic = on; periodicupper = tp+tw
  an4: Analytic "Pot time function" | funcname = E; expr = Ein+p(t)*Ep+s(t)*Es; args = t; argunit = s; fununit = V; complex = on

Variables
  var1 "Variables 1"
    kf = k0*exp((-a)*n*fc*(E(t)-E0))  // Forward rate constant
    kb = k0*exp((1-a)*n*fc*(E(t)-E0))  // Backward rate costant

Geometry
  geom1 "Geometry 1" (2D axisymmetric, length unit m)
    r1: Rectangle "electrode" | size = {el_rad, 100*el_rad}
    r2: Rectangle "glass" | size = {RG*el_rad, 100*el_rad}
    r3: Rectangle "solution" | pos = {0, -100*el_rad}; size = {100*el_rad, 200*el_rad}
    fin: Finalize "Form Union"

Physics
  tds: DilutedSpecies "Transport of Diluted Species" on domains 1
    dependent variable Cox = {Cox, Cred}
    TransportMechanism.Convection = 0
    cdm1: ConvectionDiffusionMigration "Transport Properties 1" (default) | D_Cox = D; D_Cred = D; minput_temperature = Tb
    axi1: AxialSymmetry (default)
    nflx1: NoFlux (default)
    init1: init "Initial Values 1" (default) | initc = {Cb, 0}
    conc1: Concentration on boundaries 2, 10, 11 | species = {1, 1}; c0 = {Cb, 0}
    fl1: FluxBoundary "Flux 1" on boundaries 4 | species = {1, 1}; J0 = {-(kf*Cox-kb*Cred), kf*Cox-kb*Cred}

Mesh
  mesh1 "Mesh 1"
    edg1: Edge on boundaries 4
      size1: Size on entire geometry | hmax = el_rad/100; custom = on
    ftri1: FreeTri "Free Triangular 1" on domains 1 | smoothmaxiter = 4; smoothmaxdepth = 4

Studies
  std1 "Study 1"
    time: Transient "Time Dependent-forward sample" | tlist = range(0.0099,0.01,t_tot)

Datasets
  dset1: Solution | solution = none
  rev1: Revolve2D "Revolution 2D 1" | data = dset1; startangle = -90; revangle = 225
  dset2: Solution | solution = none
  rev2: Revolve2D "Revolution 2D 2" | data = dset2; startangle = -90; revangle = 225

Tables
  tbl2: Table
    // Line Integration 1
    Time (s) | tds.tflux_Coxz*FAR*n (A) | E(t)/(3.14*el_rad^2) (V)
    0.0099 | 6.56554e-12 | 0.500254
    0.0199 | 9.13122e-13 | 0.500254
    0.0299 | 6.80191e-13 | 0.500254
    0.0399 | 6.01329e-13 | 0.500254
    0.0499 | 5.82592e-13 | 0.500254
    0.0599 | 5.66117e-13 | 0.500254
    0.0699 | 5.63956e-13 | 0.500254
    0.0799 | 5.61794e-13 | 0.500254
    0.0899 | 5.59633e-13 | 0.500254
    0.0999 | 5.57471e-13 | 0.500254
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
Plots
  pg9: PlotGroup1D "1D Plot Group 9" | data = dset1; xspacing = 0.1
    tblp1: Table "Table Graph 1" | table = tbl2; xaxisdata = 1; plotcolumninput = manual; plotcolumns = 2