// COMSOL Multiphysics 5.6.0.401 model "DPV_2Daxisym_TDSphysics_results9_shpere-paper.mph"
// Outline of the model tree

Parameters
  n = 1  // Number of electron transfer
  FAR = 96485[C/mol]  // Faraday constant
  Rc = 8.314[J/mol/K]  // Gas constant
  Tb = 293.15[K]  // Temperature
  fc = FAR/Rc/Tb  // f constant
  E0 = 0.25[V]  // Standard potential
  Ein = 0.5[V]  // Start potential for CV
  Ev = 0[V]  // Vertex potential for CV
  Ef = 0.5[V]  // Final potential for CV
  k0 = 1[cm/s]  // Standard rate constant
  a = 0.5  // Transfer coefficient
  Cb = 1[mM]  // Bulk concentration
  D = 1e-5[cm^2/s]  // Diffusion coefficient
  el_rad = 20[um]  // Electrode radius
  RG = 50  // Ratio between the radius of glass and electrode
  Es = -0.01[V]  // increment base potential of each step
  Ep = -0.05[V]  // pulse height
  tp = 0.02[s]  // pulse time
  tw = 1[s]  // waiting time before pulse
  ts = tw+tp  // total time of each step
  t_tot = (Ev-Ein)*(tp+tw)/Es  // total experiment time
  sr = Es/ts  // Scan rate
  Ilim = 4*n*FAR*D*Cb*el_rad  // Limiting current

Functions
  an6: Analytic "staircase" | funcname = s; expr = (sr/Es)*(t-mod(t,ts)); args = t; periodicupper = tp+tw
  an7: Analytic "pulse" | funcname = p; expr = flc1hs(t-tw,0.5*0.00001)-flc1hs(t-ts,0.5*0.00001); args = t; periodic = on; periodicupper = tp+tw
  an4: Analytic "Pot time function" | funcname = E; expr = Ein+p(t)*Ep+s(t)*Es; args = t; argunit = s; fununit = V; complex = on

Variables
  var1 "Variables 1"
    kf = k0*exp((-a)*n*fc*(E(t)-E0))  // Forward rate constant
    kb = k0*exp((1-a)*n*fc*(E(t)-E0))  // Backward rate costant

Geometry
  geom1 "Geometry 1" (2D axisymmetric, length unit m)
    r1: Rectangle "electrode" (disabled) | size = {el_rad/10, 100*el_rad}
    r2: Rectangle "glass" (disabled) | size = {RG*el_rad, 100*el_rad}
    r3: Rectangle "solution" | pos = {0, -100*el_rad}; size = {100*el_rad, 200*el_rad}
    ca1: CircularArc "sphere ele" | center = {0, -el_rad}; r = el_rad; point1 = {0, -4.0E-5}; angle1 = -90
    fin: Finalize "Form Union"

Physics
  tds: DilutedSpecies "Transport of Diluted Species" on domains 1
    dependent variable Cox = {Cox, Cred}
    TransportMechanism.Convection = 0
    cdm1: ConvectionDiffusionMigration "Transport Properties 1" (default) | D_Cox = D; D_Cred = D; minput_temperature = Tb
    axi1: AxialSymmetry (default)
    nflx1: NoFlux (default)
    init1: init "Initial Values 1" (default) | initc = {Cb, 0}
    conc1: Concentration on boundaries 2, 5, 6 | species = {1, 1}; c0 = {Cb, 0}
    fl1: FluxBoundary "Flux 1" on boundaries 7 | species = {1, 1}; J0 = {-(kf*Cox-kb*Cred), kf*Cox-kb*Cred}

Mesh
  mesh1 "Mesh 1"
    edg1: Edge on boundaries 7
      size1: Size on entire geometry | hmax = el_rad/200; custom = on
    ftri1: FreeTri "Free Triangular 1" on domains 1

Studies
  std1 "Study 1"
    time: Transient "Time Dependent-forward sample" | tlist = range(0.0099,0.01,t_tot)

Datasets
  dset1: Solution | solution = none
  rev1: Revolve2D "Revolution 2D 1" | data = dset1; startangle = -90; revangle = 225
  dset2: Solution | solution = none
  rev2: Revolve2D "Revolution 2D 2" | data = dset2; startangle = -90; revangle = 225
  dset3: Solution | solution = none
  rev3: Revolve2D "Revolution 2D 3" | data = dset3; startangle = -90; revangle = 225
  dset4: Solution | solution = none
  rev4: Revolve2D "Revolution 2D 4" | data = dset4; startangle = -90; revangle = 225
  dset5: Solution | solution = none
  rev5: Revolve2D "Revolution 2D 5" | data = dset5; startangle = -90; revangle = 225

Tables
  tbl1: Table
    // Line Integration 1
    Time (s) | (tds.tfluxMag_Cox)*FAR*n (A) | E(t)/(4*3.14*el_rad^2) (V)
    0.0099 | 5.51579e-11 | 0.500252
    0.0199 | 8.81749e-12 | 0.500252
    0.0299 | 4.77862e-12 | 0.500252
    0.0399 | 3.92288e-12 | 0.500252
    0.0499 | 3.32889e-12 | 0.500252
    0.0599 | 3.05993e-12 | 0.500252
    0.0699 | 2.94109e-12 | 0.500252
    0.0799 | 2.82225e-12 | 0.500252
    0.0899 | 2.70341e-12 | 0.500252
    0.0999 | 2.61411e-12 | 0.500252
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
Plots
  pg14: PlotGroup1D "Current-time" | data = dset1; xlabel = Time (s); ylabel = Current (A)
    tblp1: Table "Table Graph 1" | table = tbl1; xaxisdata = 1; plotcolumninput = manual; plotcolumns = 2